**
** ex12_rigid_plate_display_fold.inp
** 90-degree folding with rigid plate + surface tie (High-Fidelity Mesh)
**
*HEADING
Display folding with rigid plate and tie constraints
**
*NODE
1, -40.000000, 0.000000
2, -39.750000, 0.000000
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**
*ELEMENT, TYPE=CPE4, ELSET=DISP_LAYER01
1, 1, 2, 146, 145
2, 2, 3, 147, 146
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*ELEMENT, TYPE=CPE4, ELSET=DISP_LAYER02
143, 145, 146, 349, 348
144, 146, 147, 350, 349
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*ELEMENT, TYPE=CPE4, ELSET=DISP_LAYER03
749, 754, 755, 958, 957
750, 755, 756, 959, 958
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*ELEMENT, TYPE=CPE4, ELSET=DISP_LAYER04
951, 957, 958, 1161, 1160
952, 958, 959, 1162, 1161
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*ELEMENT, TYPE=CPE4, ELSET=DISP_LAYER05
1557, 1566, 1567, 1770, 1769
1558, 1567, 1568, 1771, 1770
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*ELEMENT, TYPE=CPE4, ELSET=DISP_LAYER06
1759, 1769, 1770, 1973, 1972
1760, 1770, 1771, 1974, 1973
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*ELEMENT, TYPE=CPE4, ELSET=DISP_LAYER07
2365, 2378, 2379, 2582, 2581
2366, 2379, 2380, 2583, 2582
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*ELEMENT, TYPE=CPE4, ELSET=DISP_LAYER08
2567, 2581, 2582, 2785, 2784
2568, 2582, 2583, 2786, 2785
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*ELEMENT, TYPE=CPE4, ELSET=DISP_LAYER09
3173, 3190, 3191, 3394, 3393
3174, 3191, 3192, 3395, 3394
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*ELEMENT, TYPE=CPE4, ELSET=DISP_LAYER10
3375, 3393, 3394, 3597, 3596
3376, 3394, 3395, 3598, 3597
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*ELEMENT, TYPE=CPE4, ELSET=DISP_LAYER11
3981, 4002, 4003, 4206, 4205
3982, 4003, 4004, 4207, 4206
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*ELEMENT, TYPE=CPE4, ELSET=DISP_LAYER12
4183, 4205, 4206, 4409, 4408
4184, 4206, 4207, 4410, 4409
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*ELEMENT, TYPE=CPE4, ELSET=DISP_LAYER13
4789, 4814, 4815, 5018, 5017
4790, 4815, 4816, 5019, 5018
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*ELEMENT, TYPE=CPE4, ELSET=DISP_LAYER14
4991, 5017, 5018, 5221, 5220
4992, 5018, 5019, 5222, 5221
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*ELEMENT, TYPE=CPE4, ELSET=PLATE_LEFT
100000, 100001, 100002, 100063, 100062
100001, 100002, 100003, 100064, 100063
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*ELEMENT, TYPE=CPE4, ELSET=PLATE_RIGHT
100240, 100307, 100308, 100369, 100368
100241, 100308, 100309, 100370, 100369
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**
*MATERIAL, NAME=PET
*ELASTIC
4000.0, 0.3
*PLASTIC
80.0, 0.0
480.0, 1.0
**
*MATERIAL, NAME=PSA
*HYPERELASTIC, ARRUDA-BOYCE
0.015614, 3.0, 2.4000096000384
*VISCOELASTIC, TIME=PRONY
0.12, 0.0, 0.7
0.08, 0.0, 7.0
*TRS, DEFINITION=WLF
25.0, 17.0, 51.6
**
*MATERIAL, NAME=STEEL
*ELASTIC
20000.0, 0.3
**
*MATERIAL, NAME=GLASS
*ELASTIC
70000.0, 0.22
*PLASTIC
1000000000.0, 0.0
1000000000.0, 1.0
**
*SOLID SECTION, ELSET=DISP_LAYER01, MATERIAL=PSA
1.0,
*SOLID SECTION, ELSET=DISP_LAYER02, MATERIAL=PET
1.0,
*SOLID SECTION, ELSET=DISP_LAYER03, MATERIAL=PSA
1.0,
*SOLID SECTION, ELSET=DISP_LAYER04, MATERIAL=PET
1.0,
*SOLID SECTION, ELSET=DISP_LAYER05, MATERIAL=PSA
1.0,
*SOLID SECTION, ELSET=DISP_LAYER06, MATERIAL=PET
1.0,
*SOLID SECTION, ELSET=DISP_LAYER07, MATERIAL=PSA
1.0,
*SOLID SECTION, ELSET=DISP_LAYER08, MATERIAL=PET
1.0,
*SOLID SECTION, ELSET=DISP_LAYER09, MATERIAL=PSA
1.0,
*SOLID SECTION, ELSET=DISP_LAYER10, MATERIAL=PET
1.0,
*SOLID SECTION, ELSET=DISP_LAYER11, MATERIAL=PSA
1.0,
*SOLID SECTION, ELSET=DISP_LAYER12, MATERIAL=PET
1.0,
*SOLID SECTION, ELSET=DISP_LAYER13, MATERIAL=PSA
1.0,
*SOLID SECTION, ELSET=DISP_LAYER14, MATERIAL=GLASS
1.0,
*SOLID SECTION, ELSET=PLATE_LEFT, MATERIAL=STEEL
1.0,
*SOLID SECTION, ELSET=PLATE_RIGHT, MATERIAL=STEEL
1.0,
**
*NSET, NSET=DISP_BOT_L_NODES
1, 2, 3, 4, 5, 6
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*SURFACE, NAME=DISPLAY_BOT_L, TYPE=NODE
DISP_BOT_L_NODES,
*NSET, NSET=DISP_BOT_R_NODES
84, 85, 86, 87, 88, 89
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*SURFACE, NAME=DISPLAY_BOT_R, TYPE=NODE
DISP_BOT_R_NODES,
*NSET, NSET=PLATE_L_TOP_NODES
100245, 100246, 100247, 100248, 100249, 100250
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*SURFACE, NAME=PLATE_L_TOP, TYPE=NODE
PLATE_L_TOP_NODES,
*NSET, NSET=PLATE_R_TOP_NODES
100551, 100552, 100553, 100554, 100555, 100556
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*SURFACE, NAME=PLATE_R_TOP, TYPE=NODE
PLATE_R_TOP_NODES,
*NSET, NSET=PLATE_L_SLAVES
100001, 100002, 100003, 100004, 100005, 100006
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*NSET, NSET=PLATE_R_SLAVES
100307, 100308, 100309, 100310, 100311, 100312
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**
*RIGID BODY, NSET=PLATE_L_SLAVES, REF NODE=100000
*RIGID BODY, NSET=PLATE_R_SLAVES, REF NODE=100306
*TIE, NAME=TIE_LEFT
DISPLAY_BOT_L, PLATE_L_TOP
*TIE, NAME=TIE_RIGHT
DISPLAY_BOT_R, PLATE_R_TOP
**
*STEP, NLGEOM=YES
*DYNAMIC, APPLICATION=MODERATE DISSIPATION, ALPHA=-0.2200
  0.005, 1.0, 1e-05, 0.01
**
*CONTROLS, PARAMETERS=TIME INCREMENTATION
  50, 16, 9, 20, 4, 10, 1.5, 0.25
**
*CONTROLS, PARAMETERS=FIELD
  0.01, 0.01, 0.0001, 1e-06
**
*SECTION CONTROLS, NAME=PSA_DISTORTION_CTRL, DISTORTION CONTROL=YES, LENGTH RATIO=0.20
**
*BOUNDARY
100000, 1, 2, 0.0
100306, 1, 2, 0.0
**
*BOUNDARY
100000, 6, 6, -1.570796
100306, 6, 6, 1.570796
**
*END STEP
